ALL_FACTIONS := 25000
Kted := 80.9
FACTIONS := 7
Ktes := 74.87
NA := 6.022*10^23
Map := 16820
MMS := 0.092
Cap := 0.46
MMd := 0.054
Cpm := 1.8436
dpm := 0.763
Ki0 := 0.835*10^10
Ch := 4.19
Ks0 := 5.76*10^11
ph := 1
Kd0 := 2*10^12
Ghd1 := 1666
Th := 290
Ei := 59962
Ghs := 1500
ng := 0.125
Es := 71184
Jk := 0.00478
Ed := 80850
Md1 := 1765
Pd := 0.638
R := 8.32
Mr := 11400
Pr := 0.748
Temp0 := [310.4; 310.9; 311.5; 312.4; 313.6; 315.2; 316.7; 318.5; 320.7; 322.3; 324.4; 326.6; 328.2; 329.8; 331; 332; 333.3; 333.3; 333.7; 333.7; 333.7; 333.5; 333.4; 333.2; 332.8; 332.6; 332.3; 332; 331.7; 331.4]
Temp1 := [307.4; 307.5; 307.6; 307.7; 308.2; 308.8; 309.6; 310.5; 311.5; 312.5; 313.7; 315; 316.5; 318.2; 320.2; 322.6; 325.6; 329.2; 334.6; 341.6; 353; 363.2; 368.8; 370.8; 371.4; 370.8]
Ms := 1140
Ps := 0.91
A := 14.17
B := 1.007
T0 := 310.4
C := 10.3823
T1 := 307.4
ws := -0.4142
wd := -0.184
Vk := 139.2
b := 3.77
Vd1 := Md1/Pd
Fst := 42
Vr := Mr/Pr
Vs := Ms/Ps
Vt := Vk + Vs + Vr
ms0 := 0.745
Jacd1 := Jk*Vt/(Vt + Vd1)
md10 := Pd*Vd1/(MMd*(Vt + Vd1))
L := (Vt - 3000)/28500
solve block
    # constraints
    d/dt(Xi(t)) == Ki0*e^(-Ei/(R*temp(t)))*ms0*(1 - Xi(t))*(1 - Xs(t))
    d/dt(Xs(t)) == ((Ki0*e^(-Ei/(R*temp(t)))*Jk*(1 - Xi(t))) + Ks0*e^(-Es/(R*temp(t)))*((Jk*Xi(t))^(0.5 + ws*(Ms*Xs(t)/Mr))))*(1 - Xs(t))
    d/dt(temp(t)) == (Ktes*(d/dt(Xs(t)))*ms0*Vt - (A - B*e^(C*(Ms*Xs(t)/Mr)))*Fst*L*(temp(t) - Th)*Ghs*Ch*ph/((A - B*e^(C*(Ms*Xs(t)/Mr)))*L*Fst + Ghs*Ch*ph))/((Map*Cap) + (Vt*dpm*Cpm))
    d/dt(P0(t)) == -(Ks0*e^(-Es/(R*temp(t)))/Jk^(0.5 - ws*(Ms*Xs(t)/Mr)))*(ms0*(1 - Xs(t)))*P0(t) + (Ki0*e^(-Ei/(R*temp(t))))*(ms0*(1 - Xs(t)))*Jk*(1 - Xi(t))
    d/dt(P1(t)) == -(Ks0*e^(-Es/(R*temp(t)))/Jk^(0.5 - ws*(Ms*Xs(t)/Mr)))*(ms0*(1 - Xs(t)))*P1(t) + (Ks0*e^(-Es/(R*temp(t)))/Jk^(0.5 - ws*(Ms*Xs(t)/Mr)))*(ms0*(1 - Xs(t)))*P0(t)
    d/dt(P2(t)) == -(Ks0*e^(-Es/(R*temp(t)))/Jk^(0.5 - ws*(Ms*Xs(t)/Mr)))*(ms0*(1 - Xs(t)))*P2(t) + (Ks0*e^(-Es/(R*temp(t)))/Jk^(0.5 - ws*(Ms*Xs(t)/Mr)))*(ms0*(1 - Xs(t)))*P1(t)
    d/dt(P3(t)) == -(Ks0*e^(-Es/(R*temp(t)))/Jk^(0.5 - ws*(Ms*Xs(t)/Mr)))*(ms0*(1 - Xs(t)))*P3(t) + (Ks0*e^(-Es/(R*temp(t)))/Jk^(0.5 - ws*(Ms*Xs(t)/Mr)))*(ms0*(1 - Xs(t)))*P2(t)
    d/dt(P4(t)) == -(Ks0*e^(-Es/(R*temp(t)))/Jk^(0.5 - ws*(Ms*Xs(t)/Mr)))*(ms0*(1 - Xs(t)))*P4(t) + (Ks0*e^(-Es/(R*temp(t)))/Jk^(0.5 - ws*(Ms*Xs(t)/Mr)))*(ms0*(1 - Xs(t)))*P3(t)
    d/dt(P5(t)) == -(Ks0*e^(-Es/(R*temp(t)))/Jk^(0.5 - ws*(Ms*Xs(t)/Mr)))*(ms0*(1 - Xs(t)))*P5(t) + (Ks0*e^(-Es/(R*temp(t)))/Jk^(0.5 - ws*(Ms*Xs(t)/Mr)))*(ms0*(1 - Xs(t)))*P4(t)
    d/dt(P6(t)) == (Ks0*e^(-Es/(R*temp(t)))/Jk^(0.5 - ws*(Ms*Xs(t)/Mr)))*(ms0*(1 - Xs(t)))*P5(t)
    Xs(0) == 0
    Xi(0) == 0
    temp(0) == T0
    P0(0) == 0
    P1(0) == 0
    P2(0) == 0
    P3(0) == 0
    P4(0) == 0
    P5(0) == 0
    P6(0) == 0
    # solver
    [Xi; Xs; temp; P0; P1; P2; P3; P4; P5; P6] := odesolve([Xi(t); Xs(t); temp(t); P0(t); P1(t); P2(t); P3(t); P4(t); P5(t); P6(t)], 50)
end solve block
t := 0, 0.01 .. 10
z := 0 .. length(Temp0)
# [plot: P0(t), P1(t), P2(t), P3(t), P4(t), P5(t), P6(t) vs t]
solve block
    # guess values
    cps := Ms/(Md1 + Ms + Mr)
    # constraints
    d/dt(Xd(t)) == Kd0*(1 - b*(cps + (Md1*Xd(t))/Mr))*e^(-Ed/(R*tempd(t)))*Jacd1^(0.25 + wd*(cps + (Md1*Xd(t))/Mr))*(1 - Xd(t))
    d/dt(tempd(t)) == (Kted*(d/dt(Xd(t)))*md10*Vt - (A - B*e^(C*(cps + (Md1*Xd(t))/Mr)))*Fst*L*(tempd(t) - Th)*Ghd1*Ch*ph/((A - B*e^(C*(cps + (Md1*Xd(t))/Mr)))*L*Fst + Ghd1*Ch*ph))/((Map*Cap) + (Vt*dpm*Cpm))
    d/dt(Pd0(t)) == -(Kd0*(1 - b*(cps + (Md1*Xd(t))/Mr))*e^(-Ed/(R*tempd(t)))/Jacd1^(0.75 - wd*(cps + (Md1*Xd(t))/Mr)))*(md10*(1 - Xd(t)))*Pd0(t)
    d/dt(Pd1(t)) == -(Kd0*(1 - b*(cps + (Md1*Xd(t))/Mr))*e^(-Ed/(R*tempd(t)))/Jacd1^(0.75 - wd*(cps + (Md1*Xd(t))/Mr))*(md10*(1 - Xd(t)))*Pd1(t)) + (Kd0*(1 - b*(cps + (Md1*Xd(t))/Mr))*e^(-Ed/(R*tempd(t)))/Jacd1^(0.75 - wd*(cps + (Md1*Xd(t))/Mr)))*(md10*(1 - Xd(t)))*Pd0(t)
    d/dt(Pd2(t)) == -(Kd0*(1 - b*(cps + (Md1*Xd(t))/Mr))*e^(-Ed/(R*tempd(t)))/Jacd1^(0.75 - wd*(cps + (Md1*Xd(t))/Mr)))*(md10*(1 - Xd(t)))*Pd2(t) + (Kd0*(1 - b*(cps + (Md1*Xd(t))/Mr))*e^(-Ed/(R*tempd(t)))/Jacd1^(0.75 - wd*(cps + (Md1*Xd(t))/Mr)))*(md10*(1 - Xd(t)))*Pd1(t)
    d/dt(Pd3(t)) == -(Kd0*(1 - b*(cps + (Md1*Xd(t))/Mr))*e^(-Ed/(R*tempd(t)))/Jacd1^(0.75 - wd*(cps + (Md1*Xd(t))/Mr)))*(md10*(1 - Xd(t)))*Pd3(t) + (Kd0*(1 - b*(cps + (Md1*Xd(t))/Mr))*e^(-Ed/(R*tempd(t)))/Jacd1^(0.75 - wd*(cps + (Md1*Xd(t))/Mr)))*(md10*(1 - Xd(t)))*Pd2(t)
    d/dt(Pd4(t)) == -(Kd0*(1 - b*(cps + (Md1*Xd(t))/Mr))*e^(-Ed/(R*tempd(t)))/Jacd1^(0.75 - wd*(cps + (Md1*Xd(t))/Mr))*(md10*(1 - Xd(t)))*Pd4(t)) + (Kd0*(1 - b*(cps + (Md1*Xd(t))/Mr))*e^(-Ed/(R*tempd(t)))/Jacd1^(0.75 - wd*(cps + (Md1*Xd(t))/Mr)))*(md10*(1 - Xd(t)))*Pd3(t)
    d/dt(Pd5(t)) == -(Kd0*(1 - b*(cps + (Md1*Xd(t))/Mr))*e^(-Ed/(R*tempd(t)))/Jacd1^(0.75 - wd*(cps + (Md1*Xd(t))/Mr))*(md10*(1 - Xd(t)))*Pd5(t)) + (Kd0*(1 - b*(cps + (Md1*Xd(t))/Mr))*e^(-Ed/(R*tempd(t)))/Jacd1^(0.75 - wd*(cps + (Md1*Xd(t))/Mr)))*(md10*(1 - Xd(t)))*Pd4(t)
    d/dt(Pd6(t)) == -(Kd0*(1 - b*(cps + (Md1*Xd(t))/Mr))*e^(-Ed/(R*tempd(t)))/Jacd1^(0.75 - wd*(cps + (Md1*Xd(t))/Mr)))*(md10*(1 - Xd(t)))*Pd5(t)
    Xd(0) == 0
    tempd(0) == T1
    Pd0(0) == P0(50)
    Pd1(0) == P1(50)
    Pd2(0) == P2(50)
    Pd3(0) == P3(50)
    Pd4(0) == P4(50)
    Pd5(0) == P5(50)
    Pd6(0) == P6(50)
    # solver
    [Xd; tempd; Pd0; Pd1; Pd2; Pd3; Pd4; Pd5; Pd6] := odesolve([Xd(t); tempd(t); Pd0(t); Pd1(t); Pd2(t); Pd3(t); Pd4(t); Pd5(t); Pd6(t)], 50)
    Mr = 11400
    Pd2(2) = 7.75741e-10
    t := 0, 0.01 .. 50
    # [plot: Pd0(t), Pd1(t), Pd2(t), Pd3(t), Pd4(t), Pd5(t), Pd6(t) vs t]
end solve block
t := 0, 0.1 .. 50
z := 0, 1 .. length(Temp1)
normT :=
    A
    for i ∈ 0 .. length(Temp1) - 1
        if i == 0
            A[i] ← tempd(i)
        else
            A[i] ← tempd(i*2)
    A
normT = [307.4; 308.211; 309.077; 310.005; 311.006; 312.09; 313.27; 314.564; 315.992; 317.583; 319.372; 321.404; 323.743; 326.473; 329.709; 333.602; 338.339; 344.076; 350.719; 357.505; 363.078; 366.674; 368.612; 369.53; 369.889; 369.952]
tempd(25) = 325.053
# [plot: normT[z], Temp1[z] vs z]
length(Temp1) = 26
sum(temp(i) - Temp0[i], i = 0 .. length(Temp0) - 1) = 5.13818
sum(normT[i] - Temp1[i], i = 0 .. length(Temp1) - 1) = 145.376
